Simulations: Version=171
  DataStore
  Simulation Soil and Crop
    Weather: FileName=fake_weather_dry.met
    Clock: Start=2015-01-01; End=2022-12-31
    Summary
    SoilArbitrator
    Zone Field: Area=1; Slope=0; AspectAngle=0; Altitude=50
      SurfaceOrganicMatter: InitialResidueName=soybean; InitialResidueType=soybean; InitialResidueMass=1250; InitialStandingFraction=0; InitialCPR=0; InitialCNR=27
      Fertiliser
      Plant Maize
      Report: EventNames=[Clock].DoReport
        VariableNames:
          [Clock].Today
          //===== Summed Annually
          sum of sum([Soil].Nutrient.MineralisedN + [SurfaceOrganicMatter].SurfaceResidue.Decomposition.MineralisedN) from [Clock].StartOfYear to [Clock].EndOfYear as AnnualSoilNetMineral
          sum of sum([SurfaceOrganicMatter].SurfaceResidue.Decomposition.MineralisedN) from [Clock].StartOfYear to [Clock].EndOfYear as AnnualResidueMineral
          sum of sum([Soil].Nutrient.MineralisedN) from [Clock].StartOfYear to [Clock].EndOfYear as AnnualSoilMineral
          sum of sum([Soil].Nutrient.DenitrifiedN) from [Clock].StartOfYear to [Clock].EndOfYear as AnnualDenitrif
          sum of sum([Soil].Nutrient.N2Oatm) from [Clock].StartOfYear to [Clock].EndOfYear as AnnualN2O
          sum of [Fertiliser].NitrogenApplied from [Clock].StartOfYear to [Clock].EndOfYear as AnnualNfertilizer
          sum of [Soil].SoilWater.LeachNO3 from [Clock].StartOfYear to [Clock].EndOfYear as AnnualNleaching
          sum of (-1 * [Maize].Root.NUptake) from [Clock].StartOfYear to [Clock].EndOfYear as AnnualNUptake
          //===== Daily Values
          sum([Soil].NO3.kgha) as NO3
          sum([Soil].NH4.kgha) as NH4
          [SurfaceOrganicMatter].N  as SurfaceN
          sum([Soil].Nutrient.Microbial.N) as MicrobialN
          sum([Soil].Nutrient.FOM.N) as FreshOrganicMatterN
          sum([Soil].Nutrient.Humic.N) as HumicN
          sum([Soil].Nutrient.Denitrification.Value
          [Soil].SoilWater.LeachNO3 as NO3Leaching
          sum([Soil].Nutrient.N2Oatm) as N2OEmissions
          sum([Soil].Nutrient.DenitrifiedN) as Denitrification
          sum([Soil].Nutrient.MineralisedN + [SurfaceOrganicMatter].SurfaceResidue.Decomposition.MineralisedN) as TotalMineralization
          sum([Soil].Nutrient.MineralisedN) as SoilMineralization
          sum([SurfaceOrganicMatter].SurfaceResidue.Decomposition.MineralisedN) as SurfaceMineralization
          diff of sum([Soil].NO3.kgha + [Soil].NH4.kgha + [Soil].Urea.kgha) from [Clock].StartOfSimulation to [Clock].EndOfDay as DeltaSoilMineralN
          diff of [SurfaceOrganicMatter].N from [Clock].StartOfSimulation to [Clock].EndOfDay as DeltaSurfaceOMN
          diff of sum([Soil].Nutrient.Humic.N + [Soil].Nutrient.Microbial.N + [Soil].Nutrient.FOM.N) from [Clock].StartOfSimulation to [Clock].EndOfDay as DeltaSoilOMN
          -1 * [Maize].Root.NUptake as CropNUptake
          [Maize].Grain.Wt as CropYield
          [Maize].AboveGround.Wt as CropBiomass
          [Maize].LAI
          [Soil].Nutrient.MineralN
          [NO3].kgha
      Soil SiCL (Clarion No33): SoilType=Clarion; Region=Boone; State=Iowa; Country=US; ApsoilNumber=33; Latitude=42.02204; Longitude=-93.769115
        DataSource:
          Original data by http://websoilsurvey.sc.egov.usda.gov/App/HomePage.htm
          Profile developed by Integrated Cropping Systems Lab, Department of Agronomy, ISU
        Comments:
          The Clarion series consists of very deep, moderately well drained soils on uplands. These soils formed in glacial till. Slopes range from 1 to 9 percent. Mean annual air temperature is about 8 degrees C (47 degrees F). Mean annual precipitation is about 74 centimeters (29 inches).
          TAXONOMIC CLASS: Fine-loamy, mixed, superactive, mesic Typic Hapludolls
          TYPICAL PEDON: Clarion loam, on a convex upland with a slope of 4 percent, in a cultivated field. (Colors are for moist soil unless otherwise stated.)
          Ap--0 to 18 centimeters (7 inches); black (10YR 2/1) loam, very dark gray (10YR 3/1) dry; weak fine subangular blocky structure; friable; many roots; about 3 percent gravel; slightly acid; abrupt smooth boundary.
          A1--18 to 30 centimeters (7 to 12 inches); very dark brown (10YR 2/2) loam, very dark grayish brown (10YR 3/2) dry; weak fine subangular blocky structure; friable; many roots; about 3 percent gravel; common worm casts; slightly acid; gradual smooth boundary.
          A2--30 to 46 centimeters (12 to 18 inches); dark brown (10YR 3/3) loam, brown (10YR 4/3) dry; weak fine subangular blocky structure; friable; many roots; many distinct very dark grayish brown (10YR 3/2) coats on faces of peds; about 3 percent gravel; slightly acid; gradual smooth boundary. [Combined thickness of the A horizon is 25 to 51 centimeters (10 to 20 inches).]
          Bw1--46 to 66 centimeters (18 to 26 inches); dark yellowish brown (10YR 4/4) loam; weak fine subangular blocky structure; friable; many roots; many fine pores; common distinct dark brown (10YR 3/3) coats on faces of peds; about 3 percent gravel; neutral; gradual smooth boundary.
          Bw2--66 to 91 centimeters (26 to 36 inches); dark yellowish brown (10YR 4/4) loam; weak medium subangular blocky structure; friable; common roots; many fine pores; about 3 percent gravel; neutral; gradual smooth boundary. [Combined thickness of the Bw horizon is 20 to 71 centimeters (8 to 28 inches).]
          C1--91 to 132 centimeters (36 to 52 inches); yellowish brown (10YR 5/4) loam; massive; friable; few calcium carbonate masses; few fine distinct yellowish brown (10YR 5/6) Fe concentrations; few fine distinct light brownish gray (2.5Y 6/2) Fe depletions; about 3 percent gravel; strongly effervescent; moderately alkaline; gradual smooth boundary.
          C2--132 to 152 centimeters (52 to 60 inches); yellowish brown (10YR 5/4) loam; massive; friable; common roots; many fine pores; common fine distinct light brownish gray (2.5Y 6/2) Fe depletions; common fine distinct yellowish brown (10YR 5/6) Fe concentrations; about 3 percent gravel; strongly effervescent; moderately alkaline.
        Physical
          Thickness  ParticleSizeClay  ParticleSizeSand  ParticleSizeSilt  BD    AirDry  LL15   DUL    SAT       KS
          90         21                45                34                1.42  0.08    0.16   0.297  0.414151  432.152
          90         21                45                34                1.42  0.144   0.16   0.297  0.414151  432.152
          240        21                45                34                1.43  0.147   0.147  0.297  0.410377  432.152
          240        21                45                34                1.43  0.147   0.147  0.297  0.410377  432.152
          230        21                45                34                1.6   0.165   0.165  0.289  0.346226  432.152
          230        21                45                34                1.6   0.165   0.165  0.289  0.346226  432.152
          300        15                49                36                1.6   0.105   0.105  0.291  0.346226  432.152
          300        15                49                36                1.6   0.105   0.105  0.291  0.346226  432.152
          SoilCrop MaizeSoil
            LL=[0.16, 0.16, 0.147, 0.147, 0.165, 0.165, 0.105, 0.105]
            KL=[0.08, 0.08, 0.0729526, 0.0616707, 0.0523164, 0.0445365, 0.036996, 0.0299884]
            XF=[1, 1, 1, 1, 1, 1, 1, 1]
            LL source: Estimated based on local knowledge
          SoilCrop SoybeanSoil: same as Soil and Crop.Field.SiCL (Clarion No33).Physical.MaizeSoil
        WaterBalance SoilWater: SummerDate=1-jun; SummerU=8.55; SummerCona=3.775; WinterDate=1-nov; WinterU=8.55; WinterCona=3.775; DiffusConst=88; DiffusSlope=35; Salb=0.13; CN2Bare=76; CNRed=20; CNCov=0.8; PSIDul=-100; Thickness=[90, 90, 240, 240, 230, 230, 300, 300]
          SWCON=[0.360122, 0.360122, 0.354877, 0.354877, 0.270619, 0.270619, 0.265571, 0.265571]
        CERESSoilTemperature Temperature
        Organic: FOMCNRatio=45; CarbonUnits=Total
          Thickness  Carbon    SoilCNRatio  FBiom    FInert  FOM
          90         2.03488   13           0.04     0.4     297.859
          90         2.03488   13           0.03475  0.428   254.587
          240        1.45349   13           0.0156   0.56    167.509
          240        1.45349   13           0.0108   0.752   110.215
          230        0.726744  13           0.01     0.8     73.7935
          230        0.726744  13           0.01     0.8     49.4078
          300        0.145349  13           0.01     0.8264  29.2785
          300        0.145349  13           0.01     0.9224  17.3501
        Chemical: Thickness=[90, 90, 240, 240, 230, 230, 300, 300]; PH=[5.267, 5.267, 5.267, 5.267, 5.532, 5.532, 5.85, 5.85]; PHUnits=Water
          PH source: Estimated based on local knowledge
        Water: Thickness=[90, 90, 240, 240, 230, 230, 300, 300]; InitialValues=[0.297, 0.297, 0.297, 0.297, 0.289, 0.289, 0.291, 0.291]; InitialPAWmm=265.3; RelativeTo=LL15; FilledFromTop=true
        Nutrient
        Solute NO3: Thickness=[90, 90, 240, 240, 230, 230, 300, 300]; InitialValues=[110.87, 40.825, 2.331, 1.166, 0.815, 0.543, 0.208, 0]; InitialValuesUnits=kg/ha; WaterTableConcentration=0; D0=0; DepthConstant=0; MaxDepthSoluteAccessible=0; RunoffEffectivenessAtMovingSolute=0; MaxEffectiveRunoff=0
        Solute NH4: Thickness=[90, 90, 240, 240, 230, 230, 300, 300]; InitialValues=[4.695, 3.13, 0.583, 0.291, 0, 0, 0, 0]; InitialValuesUnits=ppm; WaterTableConcentration=0; D0=0; DepthConstant=0; MaxDepthSoluteAccessible=0; RunoffEffectivenessAtMovingSolute=0; MaxEffectiveRunoff=0
        Solute Urea: Thickness=[90, 90, 240, 240, 230, 230, 300, 300]; InitialValues=[0, 0, 0, 0, 0, 0, 0, 0]; InitialValuesUnits=kg/ha; WaterTableConcentration=0; D0=0; DepthConstant=0; MaxDepthSoluteAccessible=0; RunoffEffectivenessAtMovingSolute=0; MaxEffectiveRunoff=0
      MicroClimate: a_interception=0; b_interception=1; c_interception=0; d_interception=0; SoilHeatFluxFraction=0.4; MinimumHeightDiffForNewLayer=0; NightInterceptionFraction=0.5; ReferenceHeight=2
      Operations
        2015-03-02  [SurfaceOrganicMatter].Incorporate(fraction:0.5,depth:150)
        2015-04-22  [Maize].Sow(population:8, cultivar:"Dekalb_XL82", depth:30, rowSpacing:750);
        2015-05-05  [Fertiliser].Apply(Amount: 250, Type: Fertiliser.Types.UAN_N, Depth: 30)
        2015-09-08  [Maize].Harvest()
        2015-09-09  [Maize].EndCrop()
        2015-10-16  [SurfaceOrganicMatter].Incorporate(fraction:0.5,depth:550)
        2015-10-17  [SurfaceOrganicMatter].Incorporate(fraction:0.5,depth:200)
        2015-10-18  [SurfaceOrganicMatter].Incorporate(fraction:0.5,depth:200)
        2016-04-16  [SurfaceOrganicMatter].Incorporate(fraction:0.5,depth:150)
        2016-04-22  [Maize].Sow(population:8, cultivar:"Dekalb_XL82", depth:30, rowSpacing:750);
        2016-05-05  [Fertiliser].Apply(Amount: 250, Type: Fertiliser.Types.UAN_N, Depth: 30)
        2016-10-04  [Maize].Harvest()
        2016-10-05  [Maize].EndCrop()
        2016-10-26  [SurfaceOrganicMatter].Incorporate(fraction:0.5,depth:550)
        2016-10-27  [SurfaceOrganicMatter].Incorporate(fraction:0.5,depth:200)
        2016-10-28  [SurfaceOrganicMatter].Incorporate(fraction:0.5,depth:200)
        2017-04-21  [SurfaceOrganicMatter].Incorporate(fraction:0.5,depth:150)
        2017-04-22  [Maize].Sow(population:8, cultivar:"Dekalb_XL82", depth:30, rowSpacing:750);
        2017-05-05  [Fertiliser].Apply(Amount: 270, Type: Fertiliser.Types.UAN_N, Depth: 30)
        2017-10-04  [Maize].Harvest()
        2017-10-05  [Maize].EndCrop()
        2017-10-26  [SurfaceOrganicMatter].Incorporate(fraction:0.5,depth:550)
        2017-10-27  [SurfaceOrganicMatter].Incorporate(fraction:0.5,depth:200)
        2017-10-28  [SurfaceOrganicMatter].Incorporate(fraction:0.5,depth:200)
        2018-04-21  [SurfaceOrganicMatter].Incorporate(fraction:0.5,depth:150)
        2018-04-22  [Maize].Sow(population:8, cultivar:"Dekalb_XL82", depth:30, rowSpacing:750);
        2018-05-05  [Fertiliser].Apply(Amount: 100, Type: Fertiliser.Types.UAN_N, Depth: 30)
        2018-10-04  [Maize].Harvest()
        2018-10-05  [Maize].EndCrop()
        2018-10-26  [SurfaceOrganicMatter].Incorporate(fraction:0.5,depth:550)
        2018-10-27  [SurfaceOrganicMatter].Incorporate(fraction:0.5,depth:200)
        2018-10-28  [SurfaceOrganicMatter].Incorporate(fraction:0.5,depth:200)
        2019-04-21  [SurfaceOrganicMatter].Incorporate(fraction:0.5,depth:150)
        2019-04-22  [Maize].Sow(population:8, cultivar:"Dekalb_XL82", depth:30, rowSpacing:750);
        2019-05-05  [Fertiliser].Apply(Amount: 300, Type: Fertiliser.Types.UAN_N, Depth: 30)
        2019-10-04  [Maize].Harvest()
        2019-10-05  [Maize].EndCrop()
        2019-10-26  [SurfaceOrganicMatter].Incorporate(fraction:0.5,depth:550)
        2019-10-27  [SurfaceOrganicMatter].Incorporate(fraction:0.5,depth:200)
        2019-10-28  [SurfaceOrganicMatter].Incorporate(fraction:0.5,depth:200)
        2020-04-21  [SurfaceOrganicMatter].Incorporate(fraction:0.5,depth:150)
        2020-04-22  [Maize].Sow(population:8, cultivar:"Dekalb_XL82", depth:30, rowSpacing:750);
        2020-05-05  [Fertiliser].Apply(Amount: 300, Type: Fertiliser.Types.UAN_N, Depth: 30)
        2020-10-04  [Maize].Harvest()
        2020-10-05  [Maize].EndCrop()
        2020-10-26  [SurfaceOrganicMatter].Incorporate(fraction:0.5,depth:550)
        2020-10-27  [SurfaceOrganicMatter].Incorporate(fraction:0.5,depth:200)
        2020-10-28  [SurfaceOrganicMatter].Incorporate(fraction:0.5,depth:200)
        2021-04-21  [SurfaceOrganicMatter].Incorporate(fraction:0.5,depth:150)
        2021-04-22  [Maize].Sow(population:8, cultivar:"Dekalb_XL82", depth:30, rowSpacing:750);
        2021-05-05  [Fertiliser].Apply(Amount: 300, Type: Fertiliser.Types.UAN_N, Depth: 30)
        2021-10-04  [Maize].Harvest()
        2021-10-05  [Maize].EndCrop()
        2021-10-26  [SurfaceOrganicMatter].Incorporate(fraction:0.5,depth:550)
        2021-10-27  [SurfaceOrganicMatter].Incorporate(fraction:0.5,depth:200)
        2021-10-28  [SurfaceOrganicMatter].Incorporate(fraction:0.5,depth:200)
        2022-04-21  [SurfaceOrganicMatter].Incorporate(fraction:0.5,depth:150)
        2022-04-22  [Maize].Sow(population:8, cultivar:"Dekalb_XL82", depth:30, rowSpacing:750);
        2022-05-05  [Fertiliser].Apply(Amount: 300, Type: Fertiliser.Types.UAN_N, Depth: 30)
        2022-10-04  [Maize].Harvest()
        2022-10-05  [Maize].EndCrop()
        2022-10-26  [SurfaceOrganicMatter].Incorporate(fraction:0.5,depth:550)
        2022-10-27  [SurfaceOrganicMatter].Incorporate(fraction:0.5,depth:200)
        2022-10-28  [SurfaceOrganicMatter].Incorporate(fraction:0.5,depth:200)
        2023-04-21  [SurfaceOrganicMatter].Incorporate(fraction:0.5,depth:150)
        2023-04-22  [Maize].Sow(population:8, cultivar:"Dekalb_XL82", depth:30, rowSpacing:750);
        2023-05-05  [Fertiliser].Apply(Amount: 300, Type: Fertiliser.Types.UAN_N, Depth: 30)
        2023-10-04  [Maize].Harvest()
        2023-10-05  [Maize].EndCrop()
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