Simulations: Version=171
  DataStore
  Simulation Soil and Crop
    Weather: FileName=Iowa_CC.met
    Clock: Start=2010-01-01; End=2013-12-31
    Summary
    SoilArbitrator
    Zone Field: Area=1; Slope=0; AspectAngle=0; Altitude=50
      SurfaceOrganicMatter: InitialResidueName=soybean; InitialResidueType=soybean; InitialResidueMass=1250; InitialStandingFraction=0; InitialCPR=0; InitialCNR=27
      Fertiliser
      Plant Maize
      Report: EventNames=[Clock].DoReport
        VariableNames:
          [Clock].Today
          //===== Summed Annually
          sum of sum([Soil].Nutrient.MineralisedN + [SurfaceOrganicMatter].SurfaceResidue.Decomposition.MineralisedN) from [Clock].StartOfYear to [Clock].EndOfYear as AnnualSoilNetMineral
          sum of sum([SurfaceOrganicMatter].SurfaceResidue.Decomposition.MineralisedN) from [Clock].StartOfYear to [Clock].EndOfYear as AnnualResidueMineral
          sum of sum([Soil].Nutrient.MineralisedN) from [Clock].StartOfYear to [Clock].EndOfYear as AnnualSoilMineral
          sum of sum([Soil].Nutrient.DenitrifiedN) from [Clock].StartOfYear to [Clock].EndOfYear as AnnualDenitrif
          sum of sum([Soil].Nutrient.N2Oatm) from [Clock].StartOfYear to [Clock].EndOfYear as AnnualN2O
          sum of [Fertiliser].NitrogenApplied from [Clock].StartOfYear to [Clock].EndOfYear as AnnualNfertilizer
          sum of [Soil].SoilWater.LeachNO3 from [Clock].StartOfYear to [Clock].EndOfYear as AnnualNleaching
          sum of (-1 * [Maize].Root.NUptake) from [Clock].StartOfYear to [Clock].EndOfYear as AnnualNUptake
          //===== Daily Values
          sum([Soil].NO3.kgha) as NO3
          sum([Soil].NH4.kgha) as NH4
          [SurfaceOrganicMatter].N  as SurfaceN
          sum([Soil].Nutrient.Microbial.N) as MicrobialN
          sum([Soil].Nutrient.FOM.N) as FreshOrganicMatterN
          sum([Soil].Nutrient.Humic.N) as HumicN
          sum([Soil].Nutrient.Denitrification.Value
          [Soil].SoilWater.LeachNO3 as NO3Leaching
          sum([Soil].Nutrient.N2Oatm) as N2OEmissions
          sum([Soil].Nutrient.DenitrifiedN) as Denitrification
          sum([Soil].Nutrient.MineralisedN + [SurfaceOrganicMatter].SurfaceResidue.Decomposition.MineralisedN) as TotalMineralization
          sum([Soil].Nutrient.MineralisedN) as SoilMineralization
          sum([SurfaceOrganicMatter].SurfaceResidue.Decomposition.MineralisedN) as SurfaceMineralization
          diff of sum([Soil].NO3.kgha + [Soil].NH4.kgha + [Soil].Urea.kgha) from [Clock].StartOfSimulation to [Clock].EndOfDay as DeltaSoilMineralN
          diff of [SurfaceOrganicMatter].N from [Clock].StartOfSimulation to [Clock].EndOfDay as DeltaSurfaceOMN
          diff of sum([Soil].Nutrient.Humic.N + [Soil].Nutrient.Microbial.N + [Soil].Nutrient.FOM.N) from [Clock].StartOfSimulation to [Clock].EndOfDay as DeltaSoilOMN
          -1 * [Maize].Root.NUptake as CropNUptake
          [Maize].Grain.Wt as CropYield
          [Maize].AboveGround.Wt as CropBiomass
          [Maize].LAI
      Soil SiCL (Clarion No33): SoilType=Clarion; Region=Boone; State=Iowa; Country=US; ApsoilNumber=33; Latitude=42.02204; Longitude=-93.769115
        DataSource:
          Original data by http://websoilsurvey.sc.egov.usda.gov/App/HomePage.htm
          Profile developed by Integrated Cropping Systems Lab, Department of Agronomy, ISU
        Comments:
          The Clarion series consists of very deep, moderately well drained soils on uplands. These soils formed in glacial till. Slopes range from 1 to 9 percent. Mean annual air temperature is about 8 degrees C (47 degrees F). Mean annual precipitation is about 74 centimeters (29 inches).
          TAXONOMIC CLASS: Fine-loamy, mixed, superactive, mesic Typic Hapludolls
          TYPICAL PEDON: Clarion loam, on a convex upland with a slope of 4 percent, in a cultivated field. (Colors are for moist soil unless otherwise stated.)
          Ap--0 to 18 centimeters (7 inches); black (10YR 2/1) loam, very dark gray (10YR 3/1) dry; weak fine subangular blocky structure; friable; many roots; about 3 percent gravel; slightly acid; abrupt smooth boundary.
          A1--18 to 30 centimeters (7 to 12 inches); very dark brown (10YR 2/2) loam, very dark grayish brown (10YR 3/2) dry; weak fine subangular blocky structure; friable; many roots; about 3 percent gravel; common worm casts; slightly acid; gradual smooth boundary.
          A2--30 to 46 centimeters (12 to 18 inches); dark brown (10YR 3/3) loam, brown (10YR 4/3) dry; weak fine subangular blocky structure; friable; many roots; many distinct very dark grayish brown (10YR 3/2) coats on faces of peds; about 3 percent gravel; slightly acid; gradual smooth boundary. [Combined thickness of the A horizon is 25 to 51 centimeters (10 to 20 inches).]
          Bw1--46 to 66 centimeters (18 to 26 inches); dark yellowish brown (10YR 4/4) loam; weak fine subangular blocky structure; friable; many roots; many fine pores; common distinct dark brown (10YR 3/3) coats on faces of peds; about 3 percent gravel; neutral; gradual smooth boundary.
          Bw2--66 to 91 centimeters (26 to 36 inches); dark yellowish brown (10YR 4/4) loam; weak medium subangular blocky structure; friable; common roots; many fine pores; about 3 percent gravel; neutral; gradual smooth boundary. [Combined thickness of the Bw horizon is 20 to 71 centimeters (8 to 28 inches).]
          C1--91 to 132 centimeters (36 to 52 inches); yellowish brown (10YR 5/4) loam; massive; friable; few calcium carbonate masses; few fine distinct yellowish brown (10YR 5/6) Fe concentrations; few fine distinct light brownish gray (2.5Y 6/2) Fe depletions; about 3 percent gravel; strongly effervescent; moderately alkaline; gradual smooth boundary.
          C2--132 to 152 centimeters (52 to 60 inches); yellowish brown (10YR 5/4) loam; massive; friable; common roots; many fine pores; common fine distinct light brownish gray (2.5Y 6/2) Fe depletions; common fine distinct yellowish brown (10YR 5/6) Fe concentrations; about 3 percent gravel; strongly effervescent; moderately alkaline.
        Physical
          Thickness  ParticleSizeClay  ParticleSizeSand  ParticleSizeSilt  BD    AirDry  LL15   DUL    SAT    KS
          90         21                45                34                1.42  0.08    0.16   0.297  0.414  432.152
          90         21                45                34                1.42  0.144   0.16   0.297  0.414  432.152
          240        21                45                34                1.43  0.147   0.147  0.297  0.41   432.152
          240        21                45                34                1.43  0.147   0.147  0.297  0.41   432.152
          230        21                45                34                1.6   0.165   0.165  0.289  0.346  432.152
          230        21                45                34                1.6   0.165   0.165  0.289  0.346  432.152
          300        15                49                36                1.6   0.105   0.105  0.291  0.346  432.152
          300        15                49                36                1.6   0.105   0.105  0.291  0.346  432.152
          SoilCrop MaizeSoil: LL=[0.16, 0.16, 0.147, 0.147, 0.165, 0.165, 0.105, 0.105]; KL=[0.08, 0.08, 0.073, 0.062, 0.052, 0.045, 0.037, 0.03]; XF=[1, 1, 1, 1, 1, 1, 1, 1]
            LL source: Estimated based on local knowledge
          SoilCrop SoybeanSoil: same as Soil and Crop.Field.SiCL (Clarion No33).Physical.MaizeSoil
        WaterBalance SoilWater: SummerDate=1-jun; SummerU=8.55; SummerCona=3.775; WinterDate=1-nov; WinterU=8.55; WinterCona=3.775; DiffusConst=88; DiffusSlope=35; Salb=0.13; CN2Bare=76; CNRed=20; CNCov=0.8; PSIDul=-100; Thickness=[90, 90, 240, 240, 230, 230, 300, 300]
          SWCON=[0.360122, 0.360122, 0.354877, 0.354877, 0.270619, 0.270619, 0.265571, 0.265571]
        CERESSoilTemperature Temperature
        Organic: FOMCNRatio=45; CarbonUnits=Total
          Thickness  Carbon    SoilCNRatio  FBiom    FInert  FOM
          90         2.03488   13           0.04     0.4     297.859
          90         2.03488   13           0.03475  0.428   254.587
          240        1.45349   13           0.0156   0.56    167.509
          240        1.45349   13           0.0108   0.752   110.215
          230        0.726744  13           0.01     0.8     73.7935
          230        0.726744  13           0.01     0.8     49.4078
          300        0.145349  13           0.01     0.8264  29.2785
          300        0.145349  13           0.01     0.9224  17.3501
        Chemical: Thickness=[90, 90, 240, 240, 230, 230, 300, 300]; PH=[5.267, 5.267, 5.267, 5.267, 5.532, 5.532, 5.85, 5.85]; PHUnits=Water
          PH source: Estimated based on local knowledge
        Water: Thickness=[90, 90, 240, 240, 230, 230, 300, 300]; InitialValues=[0.297, 0.297, 0.297, 0.297, 0.289, 0.289, 0.291, 0.291]; InitialPAWmm=265.3; RelativeTo=LL15; FilledFromTop=true
        Nutrient
        Solute NO3: Thickness=[90, 90, 240, 240, 230, 230, 300, 300]; InitialValues=[9.39, 7.825, 2.331, 1.166, 0.815, 0.543, 0.208, 0]; InitialValuesUnits=ppm; WaterTableConcentration=0; D0=0; DepthConstant=0; MaxDepthSoluteAccessible=0; RunoffEffectivenessAtMovingSolute=0; MaxEffectiveRunoff=0
        Solute NH4: Thickness=[90, 90, 240, 240, 230, 230, 300, 300]; InitialValues=[4.695, 3.13, 0.583, 0.291, 0, 0, 0, 0]; InitialValuesUnits=ppm; WaterTableConcentration=0; D0=0; DepthConstant=0; MaxDepthSoluteAccessible=0; RunoffEffectivenessAtMovingSolute=0; MaxEffectiveRunoff=0
        Solute Urea: Thickness=[90, 90, 240, 240, 230, 230, 300, 300]; InitialValues=[0, 0, 0, 0, 0, 0, 0, 0]; InitialValuesUnits=kg/ha; WaterTableConcentration=0; D0=0; DepthConstant=0; MaxDepthSoluteAccessible=0; RunoffEffectivenessAtMovingSolute=0; MaxEffectiveRunoff=0
      MicroClimate: a_interception=0; b_interception=1; c_interception=0; d_interception=0; SoilHeatFluxFraction=0.4; MinimumHeightDiffForNewLayer=0; NightInterceptionFraction=0.5; ReferenceHeight=2
      Manager Sow on a fixed date
        Crop = [Maize]
        SowDate = 5-May
        CultivarName = A_105
        SowingDepth = 50
        RowSpacing = 750
        Population = 6
```csharp
using APSIM.Shared.Utilities;
using Models.Utilities;
using Models.Soils;
using Models.PMF;
using Models.Core;
using System;

namespace Models
{
    [Serializable]
    public class Script : Model
    {
        [Link] Clock Clock;
        [Link] Fertiliser Fertiliser;
        [Link] Summary Summary;
        [Link] Soil Soil;
        
        [Description("Crop")]
        public IPlant Crop { get; set; }

        [Description("Sowing date (d-mmm)")]
        public string SowDate { get; set; }

        [Display(Type = DisplayType.CultivarName)]
        [Description("Cultivar to be sown")]
        public string CultivarName { get; set; }

        [Description("Sowing depth (mm)")]
        public double SowingDepth { get; set; }

        [Description("Row spacing (mm)")]
        public double RowSpacing { get; set; }

        [Description("Plant population (/m2)")]
        public double Population { get; set; }

        [EventSubscribe("DoManagement")]
        private void OnDoManagement(object sender, EventArgs e)
        {
            if (DateUtilities.WithinDates(SowDate, Clock.Today, SowDate))
            {
                Crop.Sow(population: Population, cultivar: CultivarName, depth: SowingDepth, rowSpacing: RowSpacing);    
            }
        }
    }
}
```
      Manager Harvesting
        Crop = [Maize]
```csharp
using APSIM.Shared.Utilities;
using Models.Utilities;
using Models.Soils;
using Models.PMF;
using Models.Core;
using System;

namespace Models
{
    [Serializable] 
    public class Script : Model
    {
        [Description("Crop")]
        public IPlant Crop { get; set; }
        
        [EventSubscribe("DoManagement")]
        private void OnDoManagement(object sender, EventArgs e)
        {
            if (Crop.IsReadyForHarvesting)
            {
                Crop.Harvest();
                Crop.EndCrop();
            }
        }
    }
}
```
      Manager Fertilise on fixed dates
        FertiliserType = UreaN
        FertiliserDates = 5-May
        Amount = 240
        AmountType = False
```csharp
using Models.Soils;
using System;
using Models.Core;
using Models.PMF;
using APSIM.Shared.Utilities;
namespace Models
{
    [Serializable]
    public class Script : Model
    {
        [Link] Clock Clock;
        [Link] Fertiliser Fertiliser;
        
        [Separator("A component to apply fertiliser on one or more dates on every year of the simulation")]

        [Description("Type of fertiliser to apply? ")] 
        public Fertiliser.Types FertiliserType { get; set; }

        [Description("Enter the fertilisation dates as dd-mmm with comma separation (any year information entered will be ignored): ")] 
        public string[] FertiliserDates { get; set; } 

        [Description("Amount of fertiliser to be applied (kg /ha)")] 
        public double Amount { get; set; }

        [Description("Is the above amount to be applied each time? (yes/ticked)? Or is it the total annual amount across all dates (no/unticked)")] 
        public bool AmountType { get; set; }
        
        [EventSubscribe("DoManagement")]
        private void OnDoManagement(object sender, EventArgs e)
        {
            foreach (string ddMMM in FertiliserDates)
            {
                if (DateUtilities.DatesEqual(ddMMM, Clock.Today))
                {
                    if (AmountType)
                        Fertiliser.Apply(Amount: Amount, Type: FertiliserType);
                    else
                        Fertiliser.Apply(Amount: Amount / FertiliserDates.Length, Type: FertiliserType);
                }
            }
        }
    }
}
```
      Manager Tillage on a fixed date
        TillageDate = 10-Apr
        Fraction = 0.4
        Depth = 110
```csharp
using Models.Soils;
using System;
using Models.Core;
using Models.PMF;
using APSIM.Shared.Utilities;
using Models.Surface;

namespace Models
{
    [Serializable]
    public class Script : Model
    {
        [Link] Clock Clock;
        [Link] SurfaceOrganicMatter SOM;
        
        [Description("Tillage Date")]
        public string TillageDate { get; set; }
        
        [Description("Fraction of Residues To Incorporate (0-1)")]
        public double Fraction { get; set; }

        [Description("Depth of Tillage (mm)")]
        public double Depth { get; set; }

        [EventSubscribe("DoManagement")]
        private void OnDoManagement(object sender, EventArgs e)
        {
            if (DateUtilities.WithinDates(TillageDate, Clock.Today, TillageDate))
                SOM.Incorporate(Fraction, Depth);
        }
    }
}
```
      Operations
        2020-10-24  [SurfaceOrganicMatter].Incorporate(fraction:0.5,depth:300)
        2020-10-25  [SurfaceOrganicMatter].Incorporate(fraction:0.5,depth:200)
        2020-10-26  [SurfaceOrganicMatter].Incorporate(fraction:0.5,depth:200)
        2021-03-31  [SurfaceOrganicMatter].Incorporate(fraction:0.5,depth:150)
        2021-04-01  [Maize].Sow(population:6, cultivar:"A_105", depth:50, rowSpacing:750);
        2021-09-30  [Maize].Harvest()
        2021-10-01  [Maize].EndCrop()
        2021-10-20  [SurfaceOrganicMatter].Incorporate(fraction:0.5,depth:300)
        2021-10-21  [SurfaceOrganicMatter].Incorporate(fraction:0.5,depth:200)
        2021-10-22  [SurfaceOrganicMatter].Incorporate(fraction:0.5,depth:200)
        2022-03-08  [SurfaceOrganicMatter].Incorporate(fraction:0.5,depth:150)
        1922-05-05  [Maize].Sow(population:6, cultivar:"A_105", depth:50, rowSpacing:750);
        2022-09-12  [Maize].Harvest()
        2022-09-13  [Maize].EndCrop()
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